# Метод водяных эквивалентов
# [area: Исходные данные для теплового расчета]
P0 := 1*10^6
t1c := 20
t1h := 95
t2c := 53.9502
t2h := 61.1755
Gh := 1
Gc := 1
cp := 4180
# [area: Исходные данные для труб (диаметры)]
dн := 0.012
nтр := 20
lтр := 3
dвн := 0.01
ds := 0.08
# [area: Проходные сечения]
f1 := nтр*π*dвн^2/4 = 0.0015708
f2 := π*(ds^2 - nтр*dн^2)/4 = 0.0027646
dг1 := dвн = 0.01
П := π*(ds + dн*nтр) = 1.00531
dг2 := 4*f2/(π*(ds + dн*nтр)) = 0.011
# [area: Определение коэффициента теплопередачи]
Tср := (t1h + t2h)/2 = 78.0877
tср := (t1c + t2c)/2 = 36.9751
Tст := (Tср + tср)/2 = 57.5314
λст := 44
λ1 := wspTHERMCONDPT(P0, Tср + 273.15)
λ2 := wspTHERMCONDPT(P0, tср + 273.15)
ρ1 := 1/wspVPT(P0, Tср + 273.15) = 973.386
ρ2 := 1/wspVPT(P0, tср + 273.15) = 993.739
ν1 := wspKINVISPT(P0, Tср + 273.15)
ν2 := wspKINVISPT(P0, tср + 273.15)
Pr1ж := wspPRANDTLEPT(P0, Tср + 273.15)
Pr2ж := wspPRANDTLEPT(P0, tср + 273.15)
Pr1ст := wspPRANDTLEPT(P0, Tст + 273.15)
Pr2ст := wspPRANDTLEPT(P0, Tст + 273.15)
cph := wspCPPT(P0, Tср + 273.15) = 4191.97
cpc := wspCPPT(P0, tср + 273.15) = 4176.45
w1 := Gh/(f1*ρ1) = 0.654026
Re1 := w1*dг1/ν1 = 17526.4
Nu1 := 0.021*Re1^0.8*Pr1ж^0.43*(Pr1ж/Pr1ст)^0.25 = 68.8223
Pr1ж := wspPRANDTLEPT(P0, Tср + 273.15) = 2.28573
α1 := Nu1*λ1/dг1 = 4584.7
w2 := Gc/(f2*ρ2) = 0.363995
Re2 := w2*dг2/ν2 = 5750.75
Pr2ж := wspPRANDTLEPT(P0, tср + 273.15) = 4.62227
Nu2 := 0.023*Re2^0.8*Pr2ж^0.4*(Pr2ж/Pr2ст)^0.25 = 47.6522
α2 := Nu2*λ2/dг2 = 2708.18
R1 := 1/(α1*π*dвн*lтр*nтр) = 0.000115715
R2 := 1/(α2*π*dн*lтр*nтр) = 0.000163245
Rст := ln(dн/dвн)/(2*π*λст*nтр*lтр) = 1.09914e-5
Rсумм := R1 + R2 + Rст = 0.000289951
K := 1/Rсумм = 3448.86
# [area: Водяные эквиваленты, NTU]
Cc := Gc*cpc = 4176.45
Ch := Gh*cph = 4191.97
Cmin := min(Cc, Ch) = 4176.45
Cmax := max(Cc, Ch) = 4191.97
Cr := Cmin/Cmax = 0.996297
NTU := K/Cmin = 0.825787
ε := (1 - e^(-NTU*(1 - Cr)))/(1 - Cr*e^(-NTU*(1 - Cr))) = 0.45267
# [area: Тепловая мощность и конечные температуры]
Q := ε*Cmin*(t1h - t1c) = 141791
t2h := t1h - Q/Ch = 61.1755
t2c := t1c + Q/Cc = 53.9502
ΔT1 := t2h - t1c = 41.1755
ΔT2 := t1h - t2c = 41.0498
ΔTmin := min(ΔT1, ΔT2) = 41.0498
ΔTmax := max(ΔT1, ΔT2) = 41.1755
ΔTlg := (ΔTmax - ΔTmin)/ln(ΔTmax/ΔTmin) = 41.1126
Qalt := K*ΔTlg = 141791
